// COMSOL Multiphysics 6.4.0.343 model "Epiretinal_Heat_Stimulation.mph"
// Outline of the model tree

Parameters
  d_vitreous = 25[um]  // Thickness vitreous layer
  sig_vitreous = 1.25[S/m]  // Electrical conductivity vitreous layer
  eps_vitreous = 98  // Relative permittivity vitreous layer
  k_vitreous = 0.578[W/(m*K)]  // Thermal conductivity vitreous layer
  d_rgc = 22[um]  // Thickness RGC layer
  sig_rgc = 0.02262[S/m]  // Electrical conductivity RGC layer
  eps_rgc = 150000  // Relative permittivity RGC layer
  k_rgc = 0.5650[W/(m*K)]  // Thermal conductivity RGC layer
  d_ipl = 23[um]  // Thickness inner plexiform layer
  sig_ipl = 0.03717[S/m]  // Electrical conductivity inner plexiform layer
  eps_ipl = 235240  // Relative permittivity inner plexiform layer
  k_ipl = 0.5650[W/(m*K)]  // Thermal conductivity inner plexiform layer
  d_inl = 27[um]  // Thickness inner nuclear layer
  sig_inl = 0.01277[S/m]  // Electrical conductivity inner nuclear layer
  eps_inl = 235240  // Relative permittivity inner nuclear layer
  k_inl = 0.5650[W/(m*K)]  // Thermal conductivity inner nuclear layer
  d_opl = 16[um]  // Thickness outer plexiform layer
  sig_opl = 0.03401[S/m]  // Electrical conductivity outer plexiform layer
  eps_opl = 235240  // Relative permittivity outer plexiform layer
  k_opl = 0.5650[W/(m*K)]  // Thermal conductivity outer plexiform layer
  d_onl = 31[um]  // Thickness outer nuclear layer
  sig_onl = 0.01244[S/m]  // Electrical conductivity outer nuclear layer
  eps_onl = 235240  // Relative permittivity outer nuclear layer
  k_onl = 0.5650[W/(m*K)]  // Thermal conductivity outer nuclear layer
  d_srs = 40[um]  // Thickness sub-retinal space
  sig_srs = 0.04831[S/m]  // Electrical conductivity sub-retinal space
  eps_srs = 235240  // Relative permittivity sub-retinal space
  k_srs = 0.5650[W/(m*K)]  // Thermal conductivity sub-retinal space
  d_rpe = 20[um]  // Thickness retinal pigment epithelium
  sig_rpe = 0.01[S/m]  // Electrical conductivity retinal pigment epithelium
  eps_rpe = 235240  // Relative permittivity retinal pigment epithelium
  k_rpe = 0.5650[W/(m*K)]  // Thermal conductivity retinal pigment epithelium
  d_cho = 426[um]  // Thickness choroid
  sig_cho = 0.087[S/m]  // Electrical conductivity choroid
  eps_cho = 150000  // Relative permittivity choroid
  k_cho = 0.5650[W/(m*K)]  // Thermal conductivity choroid
  width = 5*600E-6[m]
  depth = 5*600E-6[m]
  rho1 = 1000[kg/m^3]  // Density
  Cp1 = 4180[J/(kg*K)]  // Heat capacity at constant pressure
  d_elec = 10[um]  // Thickness platinum electrode
  r_elec = 100[um]  // Radius platinum electrode (Diameter 200um)
  pitch_elec = 575[um]  // Center-to-center spacing of electrodes
  sig_pt = 9.43e6[S/m]  // Electrical conductivity Platinum
  eps_pt = 1  // Relative permittivity Platinum
  k_pt = 71.6[W/(m*K)]  // Thermal conductivity Platinum
  rho_pt = 21450[kg/m^3]  // Density Platinum
  cp_pt = 133[J/(kg*K)]  // Heat capacity Platinum
  d_poly = 15[um]  // Thickness polyimide substrate
  sig_poly = 1e-14[S/m]  // Electrical conductivity Polyimide (Insulator)
  eps_poly = 3.4  // Relative permittivity Polyimide
  k_poly = 0.12[W/(m*K)]  // Thermal conductivity Polyimide (Insulator)
  rho_poly = 1420[kg/m^3]  // Density Polyimide
  cp_poly = 1090[J/(kg*K)]  // Heat capacity Polyimide
  freq_stim = 50[Hz]  // Frequenza di stimolazione
  T_stim = 1/freq_stim  // Periodo dell'impulso
  Is = 20[uA]  // Ampiezza dell'impulso di stimolazione
  omega_b = 0.004[1/s]  // Tasso di perfusione sanguigna della coroide
  Q_onl = 10000[W/m^3]  // Metabolic heat - photoreceptors (ONL), dark - adapted
  Q_rpe = 4000[W/m^3]  // Metabolic heat - retinal pigment epithelium
  Q_inl = 1500[W/m^3]  // Metabolic heat - inner nuclear layer
  Q_rgc = 1500[W/m^3]  // Metabolic heat - retinal ganglion cells
  Q_ipl = 800[W/m^3]  // Metabolic heat - inner plexiform layer
  Q_opl = 800[W/m^3]  // Metabolic heat - outer plexiform layer
  Q_srs = 0[W/m^3]  // Metabolic heat - subretinal space (fluid)
  Q_vitreous = 0[W/m^3]  // Metabolic heat - vitrous (fluid)
  Q_cho = 0[W/m^3]  // Metabolic heat - choroid (removed by perfusion)
  T_body = 310.15[K]  // Body Temperature (37 °C)
  met_on = 1  // boolean activation of the metaboklic study
  poly_k = k_poly  // Thermal conductivity switch for polyimide

Functions
  pw1: Piecewise | funcname = impulso_bifasico; arg = t; extrap = periodic; pieces = {{0, 0.001, 1}, {0.001, 0.0011, 0}, {0.0011, 0.0021, -1}, {0.0021, T_stim, 0}}

Geometry
  geom1 "Geometry 1" (3D, length unit m)
    blk1: Block "Vitreous" | size = {width, depth, d_vitreous}
    blk2: Block "RGC" | size = {width, depth, d_rgc}; pos = {0, 0, d_vitreous}
    blk3: Block "IPL" | size = {width, depth, d_ipl}; pos = {0, 0, d_vitreous + d_rgc}
    blk4: Block "INL" | size = {width, depth, d_inl}; pos = {0, 0, d_vitreous + d_rgc + d_ipl}
    blk5: Block "OPL" | size = {width, depth, d_opl}; pos = {0, 0, d_vitreous + d_rgc + d_ipl + d_inl}
    blk6: Block "ONL" | size = {width, depth, d_onl}; pos = {0, 0, d_vitreous + d_rgc + d_ipl + d_inl + d_opl}
    blk7: Block "SRS" | size = {width, depth, d_srs}; pos = {0, 0, d_vitreous + d_rgc + d_ipl + d_inl + d_opl + d_onl}
    blk8: Block "RPE"
      size = {width, depth, d_rpe}
      pos = {0, 0, d_vitreous + d_rgc + d_ipl + d_inl + d_opl + d_onl + d_srs}
    blk9: Block "Choroid"
      size = {width, depth, d_cho}
      pos = {0, 0, d_vitreous + d_rgc + d_ipl + d_inl + d_opl + d_onl + d_srs + d_rpe}
    cyl1: Cylinder | r = r_elec; h = d_elec; pos = {width/2 - pitch_elec, depth/2 - pitch_elec, -d_elec}
    arr1: Array
      input = cyl1
      size = {3, 3, 1}
      linearsize = 3
      fullsize = {3, 3, 1}
      displ = {pitch_elec, pitch_elec, 0}
      indexattrtag = arr1.index
      indexattrtags = {arr1.index1, arr1.index2, arr1.index3}
    blk10: Block "Polyimide" | size = {width, depth, d_poly}; pos = {0, 0, -d_poly}
    dif1: Difference | input = blk10; input2 = arr1; keepsubtract = on
    fin: Finalize "Form Union"

Materials
  mat1: Common "Material_Vitreous" on domains 1, 2
    def: def "Basic"
      density = rho1
      thermalconductivity = k_vitreous
      heatcapacity = Cp1
      electricconductivity = sig_vitreous
      relpermittivity = eps_vitreous
  mat2: Common "Material_RGC" on domains 3
    def: def "Basic"
      density = rho1
      thermalconductivity = k_rgc
      heatcapacity = Cp1
      electricconductivity = sig_rgc
      relpermittivity = eps_rgc
  mat3: Common "Material_IPL" on domains 4
    def: def "Basic"
      density = rho1
      thermalconductivity = k_ipl
      heatcapacity = Cp1
      electricconductivity = sig_ipl
      relpermittivity = eps_ipl
  mat4: Common "Material_INL" on domains 5
    def: def "Basic"
      density = rho1
      thermalconductivity = k_inl
      heatcapacity = Cp1
      electricconductivity = sig_inl
      relpermittivity = eps_inl
  mat5: Common "Material_OPL" on domains 6
    def: def "Basic"
      thermalconductivity = k_opl
      density = rho1
      heatcapacity = Cp1
      electricconductivity = sig_opl
      relpermittivity = eps_opl
  mat6: Common "Material_ONL" on domains 7
    def: def "Basic"
      density = rho1
      thermalconductivity = k_onl
      heatcapacity = Cp1
      electricconductivity = sig_onl
      relpermittivity = eps_onl
  mat7: Common "Material_SRS" on domains 8
    def: def "Basic"
      density = rho1
      thermalconductivity = k_srs
      heatcapacity = Cp1
      electricconductivity = sig_srs
      relpermittivity = eps_srs
  mat8: Common "Material_RPE" on domains 9
    def: def "Basic"
      density = rho1
      thermalconductivity = k_rpe
      heatcapacity = Cp1
      electricconductivity = sig_rpe
      relpermittivity = eps_rpe
  mat9: Common "Material_Choroid" on domains 10
    def: def "Basic"
      density = rho1
      thermalconductivity = k_cho
      heatcapacity = Cp1
      electricconductivity = sig_cho
      relpermittivity = eps_cho
  mat11: Common "Platinum" on domains 11-19
    def: def "Basic"
      electricconductivity = sig_pt
      relpermittivity = eps_pt
      thermalconductivity = k_pt
      density = rho_pt
      heatcapacity = cp_pt
  mat10: Common "Material_Polyimide" on domains 1
    def: def "Basic"
      thermalconductivity = poly_k
      density = rho_poly
      heatcapacity = cp_poly
      electricconductivity = sig_poly
      relpermittivity = eps_poly

Physics
  ht: HeatTransfer "Heat Transfer in Solids" on all domains
    dependent variable T
    PhysicalModelProperty.Tref = 310.15[K]
    solid1: SolidHeatTransferModel "Solid 1" (default)
    init1: init "Initial Values 1" (default) | Tinit = T_body
    ins1: ThermalInsulation (default)
    hs1: HeatSource on domains 10 | Q0 = 1060[kg/m^3] * 3600[J/(kg*K)] * omega_b * (310.15[K] - T)
    hs2: HeatSource "Metabolic Heat - ONL (Photoreceptors)" on domains 6 | Q0 = Q_onl*met_on; materialType = from_mat
    hs3: HeatSource "Metabolic Heat - RPE" on domains 8 | Q0 = Q_rpe*met_on; materialType = from_mat
    hs4: HeatSource "Metabolic Heat - INL" on domains 4 | Q0 = Q_inl*met_on; materialType = from_mat
    hs5: HeatSource "Metabolic Heat - RGC" on domains 2 | Q0 = Q_rgc*met_on; materialType = from_mat
    hs6: HeatSource "Metabolic Heat - IPL" on domains 3 | Q0 = Q_ipl*met_on; materialType = from_mat
    hs7: HeatSource "Metabolic Heat - OPL" on domains 5 | Q0 = Q_opl*met_on; materialType = from_mat
  ec: ConductiveMedia "Electric Currents" on all domains
    dependent variable V
    cucns1: CurrentConservationSolid "Current Conservation in Solids 1" (default)
    ein1: ElectricInsulation (default)
    init1: init "Initial Values 1" (default)
    term1: Terminal "Boundary Terminal 1" on boundaries 45, 49, 53, 63, 67, 71, 81, 85, 89 | I0 = Is * impulso_bifasico(t)
    gnd1: Ground on boundaries 31

Multiphysics
  emh1: ElectromagneticHeating on all domains | EMHeat_physics = ec; Heat_physics = ht

Mesh
  mesh1 "Mesh 1" (physics-controlled)
    size: MeshSizeDefault | hauto = 7

Studies
  std1 "Study - Joule Effect Only"
    time: Transient "Time Dependent"
      tlist = range(0, 0.0001, 0.020)
      disabledphysics = {ht/hs2, ht/hs3, ht/hs4, ht/hs5, ht/hs6, ht/hs7}
  std2 "Study - Metabolic Only"
    stat: Stationary | solve for = {ht, comp1}
  std3 "Study - Combined"
    time: Transient "Time Dependent"
      tlist = range(0,0.0001,0.020)
      useinitsol = on
      initmethod = sol
      initstudy = std2
      initsol = sol2
      useparam = on
      pname = poly_k
      plistarr = 0.12[W/(m*K)] 0.578[W/(m*K)]
      punit = W/(m*K)

Solver configurations
  sol1 "Solution 1" (study std1)
    v1: Variables "Dependent Variables 1"
    t1: Time "Time-Dependent Solver 1"
      se1: Segregated
        ss1: SegregatedStep "Electric Currents"
        ss2: SegregatedStep "Temperature"
        ll1: LowerLimit
      i1: Iterative
        mg1: Multigrid
      i2: Iterative "AMG, heat transfer variables (ht)"
        mg1: Multigrid
  sol2 "Solution 2" (study std2)
    v1: Variables "Dependent Variables 1"
    s1: Stationary "Stationary Solver 1"
      fc1: FullyCoupled
      i1: Iterative "AMG, heat transfer variables (ht)"
        mg1: Multigrid
  sol3 "Solution 3" (study std3)
    v1: Variables "Dependent Variables 1"
    t1: Time "Time-Dependent Solver 1"
      tp1: TimeParametric
      se1: Segregated
        ss1: SegregatedStep "Electric Currents"
        ss2: SegregatedStep "Temperature"
        ll1: LowerLimit
      i1: Iterative
        mg1: Multigrid
      i2: Iterative "AMG, heat transfer variables (ht)"
        mg1: Multigrid

Datasets
  dset1: Solution | solution = sol1
  dset2: Solution | solution = sol2
  dset3: Solution | solution = sol3
  cln1: CutLine3D "Cut Line - Joule"
    data = dset1
    genpoints = 
      {width/2 - pitch_elec, depth/2 - pitch_elec, (d_rgc-d_elec)/2}
      {width/2 - pitch_elec, depth/2 - pitch_elec, 2[mm]}
  cln2: CutLine3D "Cut Line - Metabolic"
    data = dset2
    genpoints = 
      {width/2 - pitch_elec, depth/2 - pitch_elec, (d_rgc-d_elec)/2}
      {width/2 - pitch_elec, depth/2 - pitch_elec, 2[mm]}
  cln3: CutLine3D "Cut Line - Combined"
    data = dset3
    genpoints = 
      {width/2 - pitch_elec, depth/2 - pitch_elec, (d_rgc-d_elec)/2}
      {width/2 - pitch_elec, depth/2 - pitch_elec, 2[mm]}

Derived values
  max1: MaxVolume "Max Delta T Studio 3" on domains 1-9 | data = dset3; table = tbl2; expr = T-T_body
  max2: MaxVolume "Max Delta T Studio 2" on domains 1-9 | data = dset2; table = tbl4; expr = T-T_body
  max3: MaxVolume "Max Delta T Studio 1" on domains 1-9 | data = dset1; table = tbl3; expr = T-T_body
  max4: MaxVolume "Max Densità di Potenza Studio 1" on all domains | data = dset1; table = tbl1; expr = ec.Qh
  max5: MaxVolume "Max Densità di Potenza Studio 3" on all domains | data = dset3; table = tbl5; expr = ec.Qh
  max6: MaxVolume "Max T Studio 1" on domains 1-9 | data = dset1; table = tbl3; expr = T; unit = K
  max7: MaxVolume "Max T Studio 3" on domains 1-9 | data = dset3; table = tbl6; expr = T; unit = K
  max8: MaxVolume "Max T Studio 2" on domains 1-9 | data = dset2; table = tbl7; expr = T; unit = K

Plots
  pg12: PlotGroup1D "Impulso Bifasico" | data = dset3
    glob1: Global | expr = impulso_bifasico(t[1/s]); title = Biphasic Stimulation Waveform
  pg1: PlotGroup3D "Distribuzione Temperatura Effetto Joule (Studio 1)" | data = dset1; axisprecision = 5
    vol1: Volume (disabled) | expr = T-T_body; unit = K
    surf1: Surface | expr = T; unit = °C
    slc2: Slice (disabled) | expr = T; unit = °C
  pg4: PlotGroup3D "Distribuzione Temperatura Fototrasduzione Metabolica (Studio 2)" | data = dset2; axisprecision = 3
    vol1: Volume (disabled) | expr = T-T_body
    surf1: Surface (disabled) | expr = T; unit = °C
    slc1: Slice | expr = T
  pg5: PlotGroup3D "Distribuzione Temperatura Stimolazione Retina naturale (Studio 3)" | data = dset3
    surf1: Surface | expr = T; unit = °C
    slc1: Slice (disabled) | expr = T; unit = °C; shift = -3.0E-4
  pg17: PlotGroup1D "Line Plot Temperatura Assoluta (studio 1)"
    data = cln1
    ylabel = Temperature (°C)
    manualgrid = on
    axisprecision = 5
    lngr1: LineGraph "T assoluta" | expr = T; unit = °C; normalizearclength = on
  pg18: PlotGroup1D "Line Plot Temperatura Assoluta (studio 2)" | data = cln2
    lngr1: LineGraph "T assoluta" | expr = T; unit = °C; normalizearclength = on
  pg22: PlotGroup1D "Line Plot Temperatura Assoluta (studio 3)" | data = cln3
    lngr1: LineGraph "T assoluta" | expr = T; unit = °C; normalizearclength = on
  pg19: PlotGroup1D "Line Plot Delta T (studio 1)" | data = cln1
    lngr1: LineGraph "T assoluta" | expr = T-T_body; unit = K; normalizearclength = on
  pg20: PlotGroup1D "Line Plot Delta T (studio 2)" | data = cln2
    lngr1: LineGraph "T assoluta" | expr = T-T_body; unit = K; normalizearclength = on
  pg21: PlotGroup1D "Line Plot Delta T (studio 3)" | data = cln3
    lngr1: LineGraph "T assoluta" | expr = T-T_body; unit = K; normalizearclength = on
  pg24: PlotGroup1D "Confronto Temperature Assolute" | data = none; axisprecision = 10
    lngr1: LineGraph | data = cln1; expr = T; normalizearclength = on
    lngr2: LineGraph | data = cln2; expr = T; normalizearclength = on
    lngr3: LineGraph | data = cln3; expr = T; normalizearclength = on
    lngr4: LineGraph | data = cln3; expr = T; normalizearclength = on
  pg25: PlotGroup1D "Confronto DeltaT" | data = none
    lngr1: LineGraph | data = cln1; expr = T-T_body; normalizearclength = on
    lngr2: LineGraph | data = cln2; expr = T-T_body; normalizearclength = on
    lngr3: LineGraph | data = cln3; expr = T-T_body; normalizearclength = on
    lngr4: LineGraph | data = cln3; expr = T-T_body; normalizearclength = on
  pg13: PlotGroup3D "Volumetric loss density, electromagnetic (Studio 1, solo Joule)" on all domains | data = dset1
    vol1: Volume (disabled) | expr = ec.Qh
    surf1: Surface "Volumetric loss density, electromagnetic (W/m^3)" | data = dset1; expr = ec.Qh
  pg15: PlotGroup3D "Volumetric loss density, electromagnetic (Studio 3, Combinato)" on all domains | data = dset3
    vol1: Volume (disabled) | expr = ec.Qh
    surf1: Surface "Volumetric loss density, electromagnetic (W/m^3)" | data = dset3; expr = ec.Qh
  pg14: PlotGroup1D "Line Plot Densità di Potenza (Studio 1, Joule)" | data = cln1
    lngr1: LineGraph | expr = ec.Qh; normalizearclength = on
  pg16: PlotGroup1D "Line Plot Densità di Potenza (Studio 3, Combined)" | data = cln3
    lngr1: LineGraph | expr = ec.Qh; normalizearclength = on
  pg23: PlotGroup1D "Confronto fra le Densità di Potenza" | data = none
    lngr1: LineGraph | data = cln1; expr = ec.Qh; normalizearclength = on
    lngr2: LineGraph | data = cln3; expr = ec.Qh; normalizearclength = on
    lngr3: LineGraph | data = cln3; expr = ec.Qh; normalizearclength = on
  pg27: PlotGroup3D "Distribuzione Temperatura Effetto Joule (Studio 1) - T diff" | data = dset1; axisprecision = 5
    vol1: Volume (disabled) | expr = T-T_body; unit = K
      tran1: Transparency | expr = T; uniformblending = 0.5
    surf1: Surface (disabled) | expr = T-T_body; unit = K
      tran1: Transparency (disabled) | expr = T; uniformblending = 0.5
    slc2: Slice | expr = T-T_body; unit = K
      tran1: Transparency | transparency = 0; expr = T
  pg26: PlotGroup3D "Distribuzione Temperatura Stimolazione Retina naturale (Studio 3) - T diff" | data = dset3
    surf1: Surface | expr = T-T_body; unit = K
    slc1: Slice (disabled) | expr = T-T_body; unit = K; shift = -3.0E-4
  pg28: PlotGroup1D "Confronto Temperature Assolute Poliimmide" | data = none; axisprecision = 10
    lngr3: LineGraph
      data = cln3
      expr = T
      normalizearclength = on
      autosolution = off
      legends = {poly_k=0.120 [W/m*K], }
    lngr4: LineGraph | data = cln3; expr = T; normalizearclength = on; legends = poly_k=0.578 [W/m*K]
  pg2: PlotGroup3D "Electric Potential (ec)" (disabled) | data = dset1
    vol1: Volume | expr = V; rangeminpositive = 6.54452983087e-14
  pg3: PlotGroup3D "Electric Field (ec)" (disabled) | data = dset1
    mslc1: Multislice
      expr = ec.normE
      multiplanexmethod = coord
      xcoord = ec.CPx
      multiplaneymethod = coord
      ycoord = ec.CPy
      multiplanezmethod = coord
      zcoord = ec.CPz
      rangeminpositive = 1.06262393319e-12
    strmsl1: StreamlineMultislice
      expr = {ec.Ex, ec.Ey, ec.Ez}
      multiplanexmethod = coord
      xcoord = ec.CPx
      multiplaneymethod = coord
      ycoord = ec.CPy
      multiplanezmethod = coord
      zcoord = ec.CPz
      tran1: Transparency | transparency = 0.9; expr = T
      filt1: Filter | expr = !isScalingSystemDomain

Exports
  anim1: Animation "Distribuzione di temperatura [°C] - Studio 1" | target = player
  anim2: Animation "Distribuzione di temperatura [°C] - Studio 3" | target = player
  anim4: Animation "Volumetric loss density [W/m^3] - Studio 1" | target = player
  anim5: Animation "Volumetric loss density [W/m^3] - Studio 3" | target = player